// SBML level 2 version 4

model The_Brusselator()
  // The famous Brusselator model in which a chemical species X catalyses its own formation. In a certain region of parameter space the Brusselator can function in a limit cycle regime around an unstable steady state. Run this simulation and then check the report file to see how Gepasi can find an unstable steady state, and calculate the eigenvalues of the Jacobian matrix.

  // Compartments:
  compartment compartment = 1;

  // Species:
  species X in compartment = 2.999996;
  species Y in compartment = 2.999996;
  species $A in compartment = 0.4999999;
  species $B in compartment = 2.999996;
  species $D in compartment = 0;
  species $E in compartment = 0;

  // Reactions:
  R1: $A => X; compartment*R1_k1*A;
    R1_k1 = 1.12298;
  R2: 2 X + Y => 3 X; compartment*R2_k1*X^2*Y;
    R2_k1 = 0.633134;
  R3: X + $B => Y + $D; compartment*R3_k1*X*B;
    R3_k1 = 0.767529;
  R4: X => $E; compartment*R4_k1*X;
    R4_k1 = 1.02339;

  // Unit definitions:
  unit volume = 1e-3 litre;
  unit substance = 1e-3 mole;
end
