// SBML level 2 version 4

model New_Model()

  // Compartments:
  compartment compartment = 1;

  // Species:
  species $F in compartment = 25;
  species $M in compartment = 43.6;
  species $K in compartment = 0.02;

  // Parameters:
  a = 0.013;
  lambdaF = 7777.8;
  C = 772.3;
  L0 = 30.4;
  kappa = 13.7;
  lambdaM = 1400;
  V = 0.9;
  b = 0.075;

  // Rate rules:
  F' = F*(-(a/(1 + K)) - 1/lambdaF*((C + kappa*L0)/(F + M) + kappa));
  M' = -M/lambdaM*((C + kappa*L0)/(F + M) + kappa);
  K' = V*a*F/(1 + K) - b;

  // Unit definitions:
  unit volume = 1e-3 litre;
  unit substance = 1e-3 mole;
  unit time = 86400 second;
end
