// SBML level 2 version 4

model New_Model()

  // Compartments:
  compartment compartment = 1;

  // Species:
  species $x in compartment = 4.4599;
  species $y in compartment = 0.137014;
  species $z in compartment = 0.460031;
  species $v in compartment = 4.596914;

  // Parameters:
  alphax = 0.0197;
  alphay = 0.0242;
  betax = 0.0175;
  betay = 0.0168;
  k1 = 10;
  k2 = 1;
  k3 = 10;
  k4 = 2;
  m1 = 5e-5;
  z0 = 12;
  gamma = 0.08;
  d0 = 1;
  c1 = 0.01;
  c2 = 0.02;
  c3 = 0.03;

  // Rate rules:
  x' = (alphax/(1 + exp((k1 - z)*k2)) - betax/(1 + exp((z - k3)*k4)) - m1*(1 - z/z0) - c1)*x + c2;
  y' = m1*(1 - z/z0)*x + (alphay*(1 - d0*(z/z0)) - betay)*y;
  z' = (z0 - z)*gamma + c3;
  v' = (alphax/(1 + exp((k1 - z)*k2)) - betax/(1 + exp((z - k3)*k4)) - m1*(1 - z/z0) - c1)*x + c2 + m1*(1 - z/z0)*x + (alphay*(1 - d0*(z/z0)) - betay)*y;

  // Unit definitions:
  unit volume = 1e-3 litre;
  unit substance = 1e-3 mole;
end
